ORIGIN := 1
# Для определения функций принадлежности терм-множеств необходимо провести регрессионный анализ. Регрессией называется подгон параметров той или иной простой функции для наилучшей аппроксимации экспериментальных данных (от латинского approximo  приближаюсь). Если аппроксимирующая функция выбрана удачно, то значения ее параметров могут быть источником разнообразной информации об измеряемой величине.
#
# По исходным данным нужно найти выборочное уравнение прямой линии регрессии Y на X, построить корреляционное поле и нанести на него прямую регрессии Y на X.
i := 1 .. 15
# x - значения средних баллов универсального множества U
# y - значения функций принадлежностей μ(u)
# Эмпирическое уравнение линейной регрессии Y на X имеет вид:
y1(x, k, y', x') := y' + k*(x - x')  # (1)
# k - коэффициент регрессии
# x' и y' - выборочные средние
# n - количество событий
# Выборочные средние рассчитываются по формулам:
x' == 1/n*sum(x[1, i], i = 1 .. n)
# (2)
y' == 1/n*sum(y[1, i], i = 1 .. n)
# Коэффициент регрессии рассчитывается по формуле:
k == sum((x[i] - x')*(y[i] - y'), i = 1 .. n)/sum((x[i] - x')^2, i = 1 .. n)  # (3)  # Μ
# Для расчета выборочного коэффициента корреляции следует воспользоваться формулой:
R == sum((x[i] - x')*(y[i] - y'), i = 1 .. n)/sqrt(sum((x[i] - x')^2, i = 1 .. n)*sum((y[i] - y')^2, i = 1 .. n))
# Для терм-множеств определим выше перечисленные параметры.
# Терм-множество "плохо"
x := [5, 12, 16, 20, 25, 26, 28, 29, 30, 32, 35, 39, 41, 45, 50, 55, 60, 63, 67, 72, 78, 82, 87, 92, 95, 100]
y := [1, 1, 1, 1, 1, 0.8, 0.7, 0.5, 0.4, 0.35, 0.25, 0.1, 0, 0, 0, 0, 0, 0, 0, 0, 0, 0, 0, 0, 0, 0]
x = [5, 12, 16, 20, 25, 26, 28, 29, 30, 32, 35, 39, 41, 45, 50, 55, 60, 63, 67, 72, 78, 82, 87, 92, 95, 100]
y = [1, 1, 1, 1, 1, 0.8, 0.7, 0.5, 0.4, 0.35, 0.25, 0.1, 0, 0, 0, 0, 0, 0, 0, 0, 0, 0, 0, 0, 0, 0]
x' := 1/9*sum(x[1, i], i = 5 .. 13) = 31.6667
y' := 1/9*sum(y[1, i], i = 5 .. 13) = 0.455556
k := sum((x[1, i] - x')*(y[1, i] - y'), i = 5 .. 13)/sum((x[1, i] - x')^2, i = 5 .. 13) = -0.0558862
# В соответствии с формулой (1) выше, искомое эмпирическое уравнение Y на X имеет вид:
y1(x, k, y', x') := y' + k*(x - x')
y11(x, k, y', x') :=
    y1(x, k, y', x') if y1(x, k, y', x') ≤ 1 and y1(x, k, y', x') ≥ 0
    1 if (y1(x, k, y', x') ≥ 1)
    0 if (y1(x, k, y', x') ≤ 0)
# На рисунке ниже изображены корреляционное поле и прямая регрессии.
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# Для расчета выборочного коэффициента корреляции следует воспользоваться формулой:
R := sum((x[1, i] - x')*(y[1, i] - y'), i = 5 .. 13)/sqrt(sum((x[1, i] - x')^2, i = 5 .. 13)*sum((y[1, i] - y')^2, i = 5 .. 13)) = -0.952665
f1(x) :=
    0 if (x ≥ 2.229/0.056 and x ≤ 100)
    (-0.056*x + 2.229) if (x ≥ 1.229/0.056 and x < 2.229/0.056)
    1 if (x ≥ 0 and x ≤ 1.229/0.056)
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# Терм-множество "удовлетворительно"
x := [
    2, 5, 10, 14, 16, 20, 23, 26, 30, 33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]
y := [
    0, 0, 0, 0, 0, 0, 0, 0, 0, 0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]
x = [
    2, 5, 10, 14, 16, 20, 23, 26, 30, 33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]
y = [
    0, 0, 0, 0, 0, 0, 0, 0, 0, 0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]
# а)
x' := 1/8*sum(x[1, i], i = 23 .. 31) = 70.5625
y' := 1/8*sum(y[1, i], i = 11 .. 18) = 0.49375
k := sum((x[1, i] - x')*(y[1, i] - y'), i = 11 .. 18)/sum((x[1, i] - x')^2, i = 11 .. 18) = 0.000582249
# Эмпирическое уравнение Y на X:
y221(x, k, y', x') := y' + k*(x - x')
y21(x, k, y', x') :=
    y221(x, k, y', x') if y221(x, k, y', x') ≤ 1 and y221(x, k, y', x') ≥ 0
    1 if (y221(x, k, y', x') ≥ 1)
    0 if (y221(x, k, y', x') ≤ 0)
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R := sum((x[1, i] - x')*(y[1, i] - y'), i = 4 .. 11)/sqrt(sum((x[1, i] - x')^2, i = 4 .. 11)*sum((y[1, i] - y')^2, i = 4 .. 11)) = 0.987792
# - коэффициент корреляции
# б)
x' := 1/9*sum(x[1, i], i = 23 .. 31) = 62.7222
y' := 1/9*sum(y[1, i], i = 23 .. 31) = 0.55
k := sum((x[1, i] - x')*(y[1, i] - y'), i = 23 .. 31)/sum((x[1, i] - x')^2, i = 23 .. 31) = -0.18823
# Эмпирическое уравнение Y на X:
y222(x, k, y', x') := y' + k*(x - x')
y22(x, k, y', x') :=
    y222(x, k, y', x') if y222(x, k, y', x') ≤ 1 and y222(x, k, y', x') ≥ 0
    1 if (y222(x, k, y', x') > 1)
    0 if (y222(x, k, y', x') < 0)
# На рисунке ниже изображены корреляционное поле и прямая регрессии.
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R := sum((x[1, i] - x')*(y[1, i] - y'), i = 16 .. 24)/sqrt(sum((x[1, i] - x')^2, i = 16 .. 24)*sum((y[1, i] - y')^2, i = 16 .. 24)) = -0.748293
# - коэффициент корреляции
f2(x) :=
    0 if (x ≥ 0 and x < 6.058/0.173) or (x ≥ 12.342/0.188 and x ≤ 100)
    (0.173*x - 6.058) if (x ≥ 6.058/0.173 and x < 7.058/0.173)
    1 if (x ≥ 7.058/0.173 and x ≤ 11.342/0.188)
    (-0.188*x + 12.342) if x ≥ 11.342/0.188 and x < 12.342/0.188
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# Терм-множество "хорошо"
# а)
x := [
    2, 5, 10, 14, 17, 23, 30, 35, 40, 46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]
y := [
    0, 0, 0, 0, 0, 0, 0, 0, 0, 0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]
x = [
    2, 5, 10, 14, 17, 23, 30, 35, 40, 46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]
y = [
    0, 0, 0, 0, 0, 0, 0, 0, 0, 0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]
x' := 1/7*sum(x[1, i], i = 15 .. 21) = 57.6143
y' := 1/7*sum(y[1, i], i = 15 .. 21) = 0.471429
k := sum((x[1, i] - x')*(y[1, i] - y'), i = 15 .. 21)/sum((x[1, i] - x')^2, i = 15 .. 21) = 0.170594
# Эмпирическое уравнение Y на X:
y311(x, k, y', x') := y' + k*(x - x')
y31(x, k, y', x') :=
    y311(x, k, y', x') if y311(x, k, y', x') ≤ 1 and y311(x, k, y', x') ≥ 0
    1 if (y311(x, k, y', x') > 1)
    0 if (y311(x, k, y', x') < 0)
# На рисунке ниже изображены корреляционное поле и прямая регрессии.
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R := sum((x[1, i] - x')*(y[1, i] - y'), i = 4 .. 10)/sqrt(sum((x[1, i] - x')^2, i = 4 .. 10)*sum((y[1, i] - y')^2, i = 4 .. 10)) = 0.931871
# - коэффициент корреляции
# б)
x' := 1/14*sum(x[1, i], i = 27 .. 40) = 84.8929
y' := 1/14*sum(y[1, i], i = 27 .. 40) = 0.442143
k := sum((x[1, i] - x')*(y[1, i] - y'), i = 27 .. 40)/sum((x[1, i] - x')^2, i = 27 .. 40) = -0.102654
# Эмпирическое уравнение Y на X:
y322(x, k, y', x') := y' + k*(x - x')
y32(x, k, y', x') :=
    y322(x, k, y', x') if y322(x, k, y', x') ≤ 1 and y322(x, k, y', x') ≥ 0
    1 if (y322(x, k, y', x') > 1)
    0 if (y322(x, k, y', x') < 0)
# На рисунке ниже изображены корреляционное поле и прямая регрессии.
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R := sum((x[1, i] - x')*(y[1, i] - y'), i = 16 .. 29)/sqrt(sum((x[1, i] - x')^2, i = 16 .. 29)*sum((y[1, i] - y')^2, i = 16 .. 29)) = -0.487977
# - коэффициент корреляции
f3(x) :=
    0 if (x ≥ 0 and x < 9.381/0.171) or (x ≥ 9.186/0.103 and x ≤ 100)
    (0.171*x - 9.381) if (x ≥ 9.381/0.171 and x < 10.381/0.171)
    1 if (x ≥ 10.381/0.171 and x ≤ 8.186/0.103)
    (-0.103*x + 9.186) if (x ≥ 8.186/0.103 and x < 9.186/0.103)
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# Терм-множество "отлично"
x := [3, 6, 10, 17, 23, 27, 35, 40, 46, 50, 55, 60, 65, 69, 70, 72, 74, 75, 76, 77, 77, 78, 79, 80, 81, 85, 90, 94, 100]
y := [0, 0, 0, 0, 0, 0, 0, 0, 0, 0, 0, 0, 0, 0, 0, 0, 0, 0, 0.09, 0.2, 0.35, 0.6, 0.7, 0.8, 1, 1, 1, 1, 1]
x = [3, 6, 10, 17, 23, 27, 35, 40, 46, 50, 55, 60, 65, 69, 70, 72, 74, 75, 76, 77, 77, 78, 79, 80, 81, 85, 90, 94, 100]
y = [0, 0, 0, 0, 0, 0, 0, 0, 0, 0, 0, 0, 0, 0, 0, 0, 0, 0, 0.09, 0.2, 0.35, 0.6, 0.7, 0.8, 1, 1, 1, 1, 1]
x' := 1/8*sum(x[1, i], i = 18 .. 25) = 77.875
y' := 1/8*sum(y[1, i], i = 18 .. 25) = 0.4675
k := sum((x[1, i] - x')*(y[1, i] - y'), i = 18 .. 25)/sum((x[1, i] - x')^2, i = 18 .. 25) = 0.174459
# Эмпирическое уравнение Y на X:
y411(x, k, y', x') := y' + k*(x - x')
y41(x, k, y', x') :=
    y411(x, k, y', x') if y411(x, k, y', x') ≤ 1 and y411(x, k, y', x') ≥ 0
    1 if (y411(x, k, y', x') > 1)
    0 if (y411(x, k, y', x') < 0)
# На рисунке ниже изображены корреляционное поле и прямая регрессии.
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R := sum((x[1, i] - x')*(y[1, i] - y'), i = 5 .. 12)/sqrt(sum((x[1, i] - x')^2, i = 5 .. 12)*sum((y[1, i] - y')^2, i = 5 .. 12)) = 0.945877
# - коэффициент корреляции
f4(x) :=
    0 if x < 13.082/0.174
    0.174*x - 13.082 if (x ≥ 13.082/0.174 and x < 14.082/0.174)
    1 if (x ≥ 14.082/0.174 and x ≤ 100)
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# ===================================================================================================
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# Рис.1 Описание лингвистической переменной "Уровень успеваемости"
# где  r - значения средних баллов универсального множества U
# f1(r), f2(r), f3(r), f4(r) - функции принадлежностей нечетких множеств универсального множества U.
